// SBML level 3 version 2

model createModelPresimulation()

  // Compartments:
  compartment default = 1;

  // Species:
  substanceOnly species __s0 in default = initProt; __s0 is "PROT(kin=None, drug=None, phospho='u')";
  substanceOnly species __s1 in default = initDrug; __s1 is "DRUG(bound=None)";
  substanceOnly species __s2 in default = initKin; __s2 is "KIN(bound=None)";
  substanceOnly species __s3 in default = 0; __s3 is "DRUG(bound=1) ._br_PROT(kin=None, drug=1, phospho='u')";
  substanceOnly species __s4 in default = 0; __s4 is "KIN(bound=1) ._br_PROT(kin=1, drug=None, phospho='u')";
  substanceOnly species __s5 in default = 0; __s5 is "PROT(kin=None, drug=None, phospho='p')";

  // Parameters:
  PROT_0 = 10;
  DRUG_0 = 9;
  KIN_0 = 1;
  kon_prot_drug = 0.1;
  koff_prot_drug = 0.1;
  kon_prot_kin = 0.1;
  kphospho_prot_kin = 0.1;
  kdephospho_prot = 0.1;
  var __obs0; __obs0 is "pPROT";
  var __obs1; __obs1 is "tPROT";

  // Assignment rules:
  initProt := PROT_0;
  initDrug := DRUG_0;
  initKin := KIN_0;
  pPROT_obs := __s5/(__s0 + __s3 + __s4 + __s5);
  __obs0 := __s5;
  __obs1 := __s0 + __s3 + __s4 + __s5;

  // Reactions:
  PROT_DRUG_bind: __s0 + __s1 -> __s3; -(koff_prot_drug*__s3) + kon_prot_drug*__s0*__s1;
  PROT_KIN_bind: __s0 + __s2 => __s4; kon_prot_kin*__s0*__s2;
  PROT_KIN_phospho: __s4 => __s2 + __s5; kphospho_prot_kin*__s4;
  PROT_dephospho: __s5 => __s0; kdephospho_prot*__s5;
end
