// SBML level 3 version 1

model main()
  // model units - substance: mole, time: second, extent: mole

  // Compartments:
  compartment c1 = 1 litre;

  // Species:
  species x1 in c1 = 0.1/c1;
  species x2 in c1 = 0.4/c1;
  species x3 in c1 = 0.7/c1;

  // Parameters:
  p1 = 1 litre2_per_mole_per_second;
  p2 = 0.5 litre2_per_mole_per_second;
  p3 = 0.4 litre_per_second;
  p4 = 2 litre_per_second;
  p5 = 0.1 mole_per_second;
  k0 = 1 litre_per_second;
  scaling_x1 = 2 dimensionless; scaling_x1 is "scale";
  offset_x2 = 3 mole_per_litre;
  observable_x1withsigma_sigma = 0.2 dimensionless;

  // Reactions:
  r1: 2 x1 => x2; p1*x1^2;
  r2: x1 + x2 => x3; p2*x1*x2;
  r3: x2 => 2 x1; p3*x2;
  r4: x3 => x1 + x2; p4*x3;
  r5: x3 => ; k0*x3;
  r6: => x1; p5;

  // Unit definitions:
  unit litre_per_second = litre / second;
  unit mole_per_litre = mole / litre;
  unit mole_per_second = mole / second;
  unit litre2_per_mole_per_second = litre^2 / (mole * second);
end
